*Heading
** Job name: Job-1 Model name: rectangle_hole_hex8
** Generated by: Abaqus/CAE 2020
*Preprint, echo=NO, model=NO, history=NO, contact=NO
**
** PARTS
**
*Part, name=PART-1
*Node
      1,  0.800000012,  0.800000012,  0.100000001
      2,  0.800000012,           0.,  0.100000001
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*Element, type=C3D8
  1,   8,  44, 175,  54,   1,  23, 155,  40
  2,  44,  43, 176, 175,  23,  24, 156, 155
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*Nset, nset=_PICKEDSET29, internal, generate
   1,  348,    1
*Elset, elset=_PICKEDSET29, internal, generate
   1,  146,    1
*Nset, nset=NSET-X0
  13,  14,  15,  16,  21,  22
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*Nset, nset=NSET-Y0
   2,   3,   5,   6,  18,  20
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*Nset, nset=NSET-X1
  3,  4,  6,  7, 10, 12
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*Nset, nset=NSET-Z0
   5,   6,   7,   8,   9,  10
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*Elset, elset=ESET-X1
 26, 27, 28, 29, 30, 61, 62, 63, 64, 65, 66
*Elset, elset=ESET-ALL, generate
   1,  146,    1
** Section: Section-1-_PICKEDSET29
*Solid Section, elset=_PICKEDSET29, material=ELASTIC
,
*End Part
**
**
** ASSEMBLY
**
*Assembly, name=Assembly
**
*Instance, name=PART-1-1, part=PART-1
          0.,           0.,           0.
          0.,           0.,           0.,           0.,           0., 1.00000001268805, 89.9999992730282
*End Instance
**
*Elset, elset=_LOADSURFACE_S4, internal, instance=PART-1-1, generate
 36,  66,   6
*Elset, elset=_LOADSURFACE_S6, internal, instance=PART-1-1, generate
 67,  91,   6
*Elset, elset=_LOADSURFACE_S4_1, internal, instance=PART-1-1, generate
 36,  66,   6
*Elset, elset=_LOADSURFACE_S6_1, internal, instance=PART-1-1, generate
 67,  91,   6
*Surface, type=ELEMENT, name=LOADSURFACE
_LOADSURFACE_S4_1, S4
_LOADSURFACE_S6_1, S6
*End Assembly
**
** MATERIALS
**
*Material, name=ELASTIC
*Elastic
200000., 0.3
** ----------------------------------------------------------------
**
** STEP: step
**
*Step, name=step, nlgeom=NO, inc=10000
*Static
1., 1., 1e-05, 1.
**
** OUTPUT REQUESTS
**
*Restart, write, frequency=0
**
** FIELD OUTPUT: F-Output-1
**
*Output, field, variable=PRESELECT
*Output, history, frequency=0
*End Step
