*Heading
** Job name: Job-1 Model name: Model-1
** Generated by: Abaqus/CAE 2020
*Preprint, echo=NO, model=NO, history=NO, contact=NO
**
** PARTS
**
*Part, name=PART-1
*Node
      1,          40.,         -11.
      2,          40.,           0.
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*Element, type=CPS4
 1,  26,  27, 507, 499
 2,  27,  28, 508, 507
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*Nset, nset=Set-All, generate
    1,  2069,     1
*Elset, elset=Set-All, generate
    1,  1916,     1
*Nset, nset=Set-Origin
 9,
*Nset, nset=Set-Fixed
  13,  14,  17,  18, 280, 281
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*Elset, elset=Set-Fixed
 867, 868, 869, 870, 946, 947
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*Nset, nset=Set-Tensile
  4,  5,  7,  8, 54, 55
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*Elset, elset=Set-Tensile
  76,  77,  78,  79,  80,  81
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*Nset, nset=Set-Middle-Plane
   9,  10,  11, 120, 121, 122, 123, 124, 181, 182, 183, 184, 185
*Elset, elset=Set-Middle-Plane
 339, 340, 341, 342, 343, 344
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** Section: Section-1
*Solid Section, elset=Set-All, material=Ti-6Al-4V
10.,
*End Part
**
**
** ASSEMBLY
**
*Assembly, name=Assembly
**
*Instance, name=Part-1-1, part=PART-1
*End Instance
**
*End Assembly
*Amplitude, name=Amp-1
             0.,              0.,              1.,              1.
**
** MATERIALS
**
*Material, name=Ti-6Al-4V
*Density
 4.43e-09,
*Elastic
115000., 0.343
*Plastic
 1161.5,      0.
 1198.5, 0.00985
 1231.9, 0.01961
 1262.6, 0.02927
 1289.4, 0.03884
 1313.3, 0.04832
 1332.7, 0.05771
  1350., 0.06701
**
** BOUNDARY CONDITIONS
**
** Name: BC-3 Type: Displacement/Rotation
*Boundary
_PickedSet5, 2, 2
_PickedSet5, 6, 6
** ----------------------------------------------------------------
**
** STEP: Step-1
**
*Step, name=Step-1, nlgeom=NO, inc=1000000
*Static
0.05, 1., 1e-06, 0.1
**
** BOUNDARY CONDITIONS
**
** Name: BC-Fixed Type: Displacement/Rotation
*Boundary
Part-1-1.Set-Fixed, 1, 1
** Name: BC-Tensile Type: Displacement/Rotation
*Boundary
Part-1-1.Set-Tensile, 1, 1, 5.
**
** OUTPUT REQUESTS
**
*Restart, write, frequency=0
**
** FIELD OUTPUT: F-Output-1
**
*Output, field, variable=PRESELECT, time interval=0.1
**
** HISTORY OUTPUT: H-Output-1
**
*Output, history, variable=PRESELECT
*End Step
