*Heading
** Job name: Job-1 Model name: Model-1
** Generated by: Abaqus/CAE 2020
*Preprint, echo=NO, model=NO, history=NO, contact=NO
**
** PARTS
**
*Part, name=PART-1
*Node
      1,          40.,           0.,           0.
      2,          40.,           0.,           5.
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*Element, type=C3D8
 1, 148, 149, 275, 274,  20,  21, 141, 140
 2, 149, 150, 276, 275,  21,  22, 142, 141
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*Element, type=C3D8R
 87, 111, 246, 299, 218,  15,  80, 217,  83
 88, 246, 126, 232, 299,  80,  16,  81, 217
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*Nset, nset=Set-All, generate
   1,  312,    1
*Elset, elset=Set-All, generate
   1,  146,    1
*Nset, nset=Set-X0
  15,  16,  17,  18,  80,  81,  82,  83, 217
*Elset, elset=Set-X0, generate
 87,  90,   1
*Nset, nset=Set-Tensile
   7,   8,   9,  10,  46,  47
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*Elset, elset=Set-Tensile, generate
 35,  46,   1
*Nset, nset=Set-Origin
 18,
*Nset, nset=Set-Z0
   1,   4,   5,   7,   9,  11
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*Elset, elset=Set-Z0
   1,   2,   3,   9,  10,  11
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*Nset, nset=Set-Y0
   1,   2,   3,   4,  11,  12
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*Elset, elset=Set-Y0
   1,   2,   3,   4,   5,   6
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** Section: Section-1
*Solid Section, elset=Set-All, material=Ti-6Al-4V
10.,
*End Part
**
**
** ASSEMBLY
**
*Assembly, name=Assembly
**
*Instance, name=Part-1-1, part=PART-1
*End Instance
**
*End Assembly
*Amplitude, name=Amp-1
             0.,              0.,              1.,              1.
**
** MATERIALS
**
*Material, name=Ti-6Al-4V
*Density
 4.43e-09,
*Elastic
115000., 0.343
*Plastic
 1161.5,      0.
 1198.5, 0.00985
 1231.9, 0.01961
 1262.6, 0.02927
 1289.4, 0.03884
 1313.3, 0.04832
 1332.7, 0.05771
  1350., 0.06701
** ----------------------------------------------------------------
**
** STEP: Step-1
**
*Step, name=Step-1, nlgeom=NO, inc=1000000
*Static
0.05, 1., 1e-06, 0.1
**
** OUTPUT REQUESTS
**
*Restart, write, frequency=0
**
** FIELD OUTPUT: F-Output-1
**
*Output, field, variable=PRESELECT, time interval=0.1
**
** HISTORY OUTPUT: H-Output-1
**
*Output, history, variable=PRESELECT
*End Step
