*Heading
** Job name: Job-1 Model name: Model-1
** Generated by: Abaqus/CAE 2020
*Preprint, echo=NO, model=NO, history=NO, contact=NO
**
** PARTS
**
*Part, name=PART-1
*Node
      1,  -5.25459719,   38.1599197,          40.
      2,  -5.25459719,   38.1599197,           0.
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*Element, type=C3D8
  1,   80,  393, 1299,  381,    1,   29,  327,   52
  2,  393,  394, 1300, 1299,   29,   30,  328,  327
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*Nset, nset=Set-Z0
    2,    3,    5,    6,   10,   11
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*Elset, elset=Set-Z0
   10,   20,   30,   40,   50,   60
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*Nset, nset=Set-Z1
    1,    4,    7,    8,    9,   12
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*Elset, elset=Set-Z1
    1,   11,   21,   31,   41,   51
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*Nset, nset=Set-Inner
    3,    4,    6,    7,   11,   12
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*Elset, elset=Set-Inner
   31,   32,   33,   34,   35,   36
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*Nset, nset=Set-All, generate
    1,  2189,     1
*Elset, elset=Set-All, generate
    1,  1640,     1
*End Part
**
**
** ASSEMBLY
**
*Assembly, name=Assembly
**
*Instance, name=Part-1-1, part=PART-1
*End Instance
**
*End Assembly
*Amplitude, name=Amp-1
             0.,              0.,              1.,              1.
**
** MATERIALS
**
*Material, name=GRAIN
*Density
 1.73e-09,
*Elastic
115000., 0.3
*Material, name=Steel
*Density
 1.73e-09,
*Elastic
 2e+06, 0.3
