*Heading
** Job name: Job-1 Model name: Model-1
** Generated by: Abaqus/CAE 2020
*Preprint, echo=NO, model=NO, history=NO, contact=NO
**
** PARTS
**
*Part, name=PART-1
*Node
      1,  -5.25459719,   38.1599197,          40.
      2,  -5.25459719,   38.1599197,           0.
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*Element, type=C3D20
  1,   84,  449, 1598,  433,    1,   29,  361,   54, 2996, 2995, 2994, 2993, 2997, 2998, 2999,
     3000, 3002, 3001, 3003, 3004
  2,  449,  450, 1599, 1598,   29,   30,  362,  361, 3007, 3006, 3005, 2995, 3008, 3009, 3010,
     2998, 3001, 3011, 3012, 3003
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*Nset, nset=Set-Z0
     2,     3,     5,     6,    10,    11
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*Elset, elset=Set-Z0
   10,   20,   30,   40,   50,   60
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*Nset, nset=Set-Z1
     1,     4,     7,     8,     9,    12
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*Elset, elset=Set-Z1
    1,   11,   21,   31,   41,   51
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*Nset, nset=Set-Inner
     3,     4,     6,     7,    11,    12
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*Elset, elset=Set-Inner
   41,   42,   43,   44,   45,   46
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*Nset, nset=Set-All, generate
     1,  11234,      1
*Elset, elset=Set-All, generate
    1,  2310,     1
*Nset, nset=Set-T0
    5,    6,    7,    8,   14,   16
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*Elset, elset=Set-T0
 101, 102, 103, 104, 105, 106
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*Nset, nset=Set-T1
    19,    20,    21,    22,    23,    24
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*Elset, elset=Set-T1
 1231, 1232, 1233, 1234, 1235, 1236
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*End Part
**
**
** ASSEMBLY
**
*Assembly, name=Assembly
**
*Instance, name=PART-1-1, part=PART-1
*End Instance
**
*Nset, nset="_T-Datum csys-2", internal
PART-1-1.Set-T0,
PART-1-1.Set-T1,
*Transform, nset="_T-Datum csys-2", type=C
          0.,           0.,           0.,           0.,           0.,           1.
*End Assembly
*Amplitude, name=Amp-1
             0.,              0.,              1.,              1.
**
** MATERIALS
**
*Material, name=GRAIN
*Density
 1.73e-09,
*Elastic
115000., 0.3
*Material, name=Steel
*Density
 1.73e-09,
*Elastic
 2e+06, 0.3
** ----------------------------------------------------------------
**
** STEP: Step-1
**
*Step, name=Step-1, nlgeom=NO
*Static
1., 1., 1e-05, 1.
**
** BOUNDARY CONDITIONS
**
** Name: BC-1 Type: Symmetry/Antisymmetry/Encastre
*Boundary
PART-1-1.Set-T0, YSYMM
** Name: BC-2 Type: Symmetry/Antisymmetry/Encastre
*Boundary
PART-1-1.Set-T1, YSYMM
**
** OUTPUT REQUESTS
**
*Restart, write, frequency=0
**
** FIELD OUTPUT: F-Output-1
**
*Output, field, variable=PRESELECT
**
** HISTORY OUTPUT: H-Output-1
**
*Output, history, variable=PRESELECT
*End Step
