*Heading
** Job name: rectangle_crack Model name: Model-1
** Generated by: Abaqus/CAE 2020
*Preprint, echo=NO, model=NO, history=NO, contact=NO
**
** PARTS
**
*Part, name=Part-1
*Node
      1,          0.5,           0.
      2,          0.5,          0.5
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*Element, type=CPS4
  1,    1,   10,  238,   85
  2,   10,   11,  239,  238
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*Nset, nset=Set-X0
    3,    4,    8,   48,   49,   50
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*Elset, elset=Set-X0
  381,  382,  383,  384,  385,  386
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*Nset, nset=Set-X1
   6,   7,   9, 124, 125, 126
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*Elset, elset=Set-X1
  781,  782,  783,  784,  785,  786
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*Nset, nset=Set-Y0
   1,   4,   9,  67,  68,  69
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*Elset, elset=Set-Y0
    1,   21,   41,   61,   81,  101
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*Nset, nset=Set-Y1
   5,   7,   8, 143, 144, 145
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*Elset, elset=Set-Y1
  401,  421,  441,  461,  481,  501
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*Nset, nset=Set-All, generate
    1,  1701,     1
*Elset, elset=Set-All, generate
    1,  1600,     1
*Nset, nset=Set-X0Y0
 4,
*Nset, nset=Set-X0Y1
 8,
*Nset, nset=_PickedSet25, internal, generate
    1,  1701,     1
*Elset, elset=_PickedSet25, internal, generate
    1,  1600,     1
*Elset, elset=__PickedSurf13_S4, internal, generate
  801,  1181,    20
*Surface, type=ELEMENT, name=_PickedSurf13, internal
__PickedSurf13_S4, S4
** Section: Section-1
*Solid Section, elset=_PickedSet25, material=Material-1
,
*End Part
**
**
** ASSEMBLY
**
*Assembly, name=Assembly
**
*Instance, name=Part-1-1, part=Part-1
*End Instance
**
*End Assembly
**
** MATERIALS
**
*Material, name=Material-1
*Elastic
100000., 0.25
*Plastic, hardening=KINEMATIC
400.,  0.
500., 0.1
** ----------------------------------------------------------------
**
** STEP: Step-1
**
*Step, name=Step-1, nlgeom=NO
*Static
1., 1., 1e-05, 1.
**
** BOUNDARY CONDITIONS
**
** Name: BC-1 Type: Displacement/Rotation
*Boundary
Part-1-1.Set-Y0, 2, 2
** Name: BC-2 Type: Displacement/Rotation
*Boundary
Part-1-1.Set-X0Y0, 1, 1
** Name: BC-3 Type: Displacement/Rotation
*Boundary
Part-1-1.Set-Y1, 2, 2, 0.05
** Name: BC-4 Type: Displacement/Rotation
*Boundary
Part-1-1.Set-X0Y1, 1, 1
**
** OUTPUT REQUESTS
**
*Restart, write, frequency=0
**
** FIELD OUTPUT: F-Output-1
**
*Output, field
*Node Output
CF, RF, U
*Element Output, directions=YES
ELEDEN, ELEN, ENER, LE, PE, PEEQ, PEMAG, S
*Contact Output
CDISP, CSTRESS
**
** HISTORY OUTPUT: H-Output-1
**
*Output, history, variable=PRESELECT
*End Step
